*Heading
** Job name: Postbuckling_25percent_pretension_Rh200 Model name: Postbuckling_25percent_pretension_Rh200
** Generated by: Abaqus/CAE 2021
*Preprint, echo=NO, model=NO, history=NO, contact=NO
**
** PARTS
**
*Part, name=Part-1
*End Part
**
**
** ASSEMBLY
**
*Assembly, name=Assembly
**
*Instance, name=Part-1-1, part=Part-1
*Node
      1,           0.,        -100.,           0.
      2,           0.,        -100.,         100.
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*Element, type=S4R
   1,    1,    9, 1117,  364
   2,    9,   10, 1118, 1117
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*Nset, nset=_PickedSet6, internal, generate
     1,  32400,      1
*Elset, elset=_PickedSet6, internal, generate
     1,  32000,      1
** Section: Section-1
*Shell Section, elset=_PickedSet6, material=Material-1
0.5, 5
*End Instance
**
*Node
      1,           0., -6.12323379e-15,         100.
*Node
      2,           0., 6.12323379e-15,           0.
*Nset, nset=_PickedSet6, internal
 1,
*Nset, nset=_PickedSet7, internal, instance=Part-1-1
    2,    3,    5,    8,   88,   89
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*Elset, elset=_PickedSet7, internal, instance=Part-1-1
    80,   160,   240,   320,   400,   480
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*Nset, nset=_PickedSet8, internal
 2,
*Nset, nset=_PickedSet9, internal, instance=Part-1-1
    1,    4,    6,    7,  266,  267
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*Elset, elset=_PickedSet9, internal, instance=Part-1-1
     1,    81,   161,   241,   321,   401
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*Nset, nset=_PickedSet11, internal
 2,
*Nset, nset=_PickedSet12, internal
 1,
*Nset, nset=_PickedSet15, internal
 1,
*Nset, nset=_PickedSet17, internal
 1,
*Nset, nset=_PickedSet18, internal
 1,
** Constraint: Constraint-1
*Rigid Body, ref node=_PickedSet6, tie nset=_PickedSet7
** Constraint: Constraint-2
*Rigid Body, ref node=_PickedSet8, tie nset=_PickedSet9
*End Assembly
**
** MATERIALS
**
*Material, name=Material-1
*Elastic
3500., 0.3
**
** BOUNDARY CONDITIONS
**
** Name: BC-1 Type: Symmetry/Antisymmetry/Encastre
*Boundary
_PickedSet11, ENCASTRE
** Name: BC-2 Type: Displacement/Rotation
*Boundary
_PickedSet12, 1, 1
_PickedSet12, 2, 2
_PickedSet12, 4, 4
_PickedSet12, 5, 5
** ----------------------------------------------------------------
*IMPERFECTION,FILE=Buckling_25percent_pretension_Rh200,STEP=2
1,0.005
2,0.0025
3,0.00125
**
** STEP: precompression
**
*Step, name=precompression, nlgeom=YES, inc=10000
*Static, stabilize, factor=1e-08, allsdtol=0, continue=NO
0.05, 1., 1e-5, 0.05
**
** LOADS
**
** Name: Load-1   Type: Concentrated force
*Cload
_PickedSet15, 3, 840.55
**
** OUTPUT REQUESTS
**
*Restart, write, frequency=0
**
** FIELD OUTPUT: F-Output-2
**
*Output, field, variable=PRESELECT
**
** HISTORY OUTPUT: H-Output-1
**
*Output, history, variable=PRESELECT
*End Step
** ----------------------------------------------------------------
**
** STEP: loading
**
*Step, name=loading, nlgeom=YES, inc=10000
*Static, stabilize, factor=1e-08, allsdtol=0, continue=NO
0.001, 1., 1e-15, 0.01
**
** BOUNDARY CONDITIONS
**
** Name: BC-3 Type: Displacement/Rotation
*Boundary
_PickedSet17, 6, 6, 0.025
**
** OUTPUT REQUESTS
**
*Restart, write, frequency=0
**
** FIELD OUTPUT: F-Output-2
**
*Output, field, variable=PRESELECT
**
** HISTORY OUTPUT: H-Output-1
**
*Output, history, variable=PRESELECT
*End Step
** ----------------------------------------------------------------
