*Heading
** Job name: Post-buckling_purecompression Model name: Post-buckling_pure_compression
** Generated by: Abaqus/CAE 2021
*Preprint, echo=NO, model=NO, history=NO, contact=NO
**
** PARTS
**
*Part, name=Part-1
*End Part
**
**
** ASSEMBLY
**
*Assembly, name=Assembly
**
*Instance, name=Part-1-1, part=Part-1
*Node
      1,           0.,         100.,           0.
      2,           0.,         100.,          50.
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*Element, type=S4R
   1,    1,   13, 1513,  288
   2,   13,   14, 1514, 1513
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*Nset, nset=_PickedSet8, internal, generate
     1,  32400,      1
*Elset, elset=_PickedSet8, internal, generate
     1,  32000,      1
** Section: Section-1
*Shell Section, elset=_PickedSet8, material=Material-1
0.5, 5
*End Instance
**
*Node
      1,           0., -6.12323379e-15,         100.
*Node
      2,           0., 6.12323379e-15,           0.
*Nset, nset=_PickedSet6, internal
 1,
*Nset, nset=_PickedSet7, internal, instance=Part-1-1
    5,    7,    8,   10,  466,  467
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*Elset, elset=_PickedSet7, internal, instance=Part-1-1
  4001,  4041,  4081,  4121,  4161,  4201
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*Nset, nset=_PickedSet8, internal
 2,
*Nset, nset=_PickedSet9, internal, instance=Part-1-1
    1,    4,   11,   12,  190,  191
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*Elset, elset=_PickedSet9, internal, instance=Part-1-1
     1,    41,    81,   121,   161,   201
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*Nset, nset=_PickedSet12, internal
 2,
*Nset, nset=_PickedSet13, internal
 1,
*Nset, nset=_PickedSet19, internal
 1,
*Nset, nset=_PickedSet21, internal
 1,
** Constraint: Constraint-1
*Rigid Body, ref node=_PickedSet6, tie nset=_PickedSet7
** Constraint: Constraint-2
*Rigid Body, ref node=_PickedSet8, tie nset=_PickedSet9
*End Assembly
**
** MATERIALS
**
*Material, name=Material-1
*Elastic
3500., 0.3
**
** BOUNDARY CONDITIONS
**
** Name: BC-1 Type: Symmetry/Antisymmetry/Encastre
*Boundary
_PickedSet12, ENCASTRE
** Name: BC-2 Type: Displacement/Rotation
*Boundary
_PickedSet13, 1, 1
_PickedSet13, 2, 2
_PickedSet13, 4, 4
_PickedSet13, 5, 5
** ----------------------------------------------------------------
*IMPERFECTION,FILE=Buckling_pure_compression,STEP=1
1,0.005
2,0.0025
3,0.00125
**
** STEP: Post-buckling_loading
**
*Step, name=Post-buckling_loading, nlgeom=YES, inc=10000
*Static, stabilize, factor=1e-08, allsdtol=0, continue=NO
0.001, 1., 1e-15, 0.01
**
** BOUNDARY CONDITIONS
**
** Name: BC-3 Type: Displacement/Rotation
*Boundary
_PickedSet19, 3, 3, -1.5
**
** OUTPUT REQUESTS
**
*Restart, write, frequency=0
**
** FIELD OUTPUT: F-Output-1
**
*Output, field, variable=PRESELECT
**
** HISTORY OUTPUT: H-Output-1
**
*Output, history, variable=PRESELECT
*End Step
** ----------------------------------------------------------------
**
** STEP: Post-buckling_unloading
**
*Step, name=Post-buckling_unloading, nlgeom=YES, inc=10000
*Static, stabilize, factor=1e-08, allsdtol=0, continue=NO
0.001, 1., 1e-15, 0.01
**
** BOUNDARY CONDITIONS
**
** Name: BC-1 Type: Symmetry/Antisymmetry/Encastre
*Boundary, op=NEW
_PickedSet12, ENCASTRE
** Name: BC-2 Type: Displacement/Rotation
*Boundary, op=NEW
_PickedSet13, 1, 1
_PickedSet13, 2, 2
_PickedSet13, 4, 4
_PickedSet13, 5, 5
** Name: BC-3 Type: Displacement/Rotation
*Boundary, op=NEW
** Name: BC-5 Type: Displacement/Rotation
*Boundary, op=NEW
_PickedSet21, 3, 3
**
** OUTPUT REQUESTS
**
*Restart, write, frequency=0
**
** FIELD OUTPUT: F-Output-1, F-Output-2
**
*Output, field, variable=PRESELECT
**
** HISTORY OUTPUT: H-Output-1, H-Output-2
**
*Output, history, variable=PRESELECT
*End Step
